*Heading
** Job name: th_170_0073 Model name: Model-1
** Generated by: Abaqus/CAE 2017
*Preprint, echo=NO, model=NO, history=NO, contact=NO
**
** PARTS
**
*Part, name=Beams-LR
*Node
      1,      -33000.,        5300.,        6500.
      2,      -33000.,        5300.,           0.
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*Element, type=B31
 1,   1, 175
 2, 175, 176
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*Nset, nset=Wire-3-Set-1
    3,    4,    5,    6,    7,    8
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*Elset, elset=Wire-3-Set-1, generate
   17,  1127,     1
*Nset, nset=Wire-4-Set-1
   1,   2, 175, 176, 177, 178
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*Elset, elset=Wire-4-Set-1, generate
  1,  16,   1
*Nset, nset=Set-3, generate
    1,  1197,     1
*Elset, elset=Set-3, generate
    1,  1127,     1
** Section: B350  Profile: B350
*Beam Section, elset=Set-3, material=CONCRETE, temperature=GRADIENTS, section=RECT
350., 350.
1.,0.,0.
*End Part
**
*Part, name=Beams-SR
*Node
      1,       12000.,        6300.,           0.
      2,       12000.,        6300.,        6000.
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*Element, type=B31
 1,  1, 23
 2, 23, 24
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*Nset, nset=Wire-3-Set-1, generate
  1,  97,   1
*Elset, elset=Wire-3-Set-1, generate
  1,  91,   1
*Nset, nset=Set-2, generate
  1,  97,   1
*Elset, elset=Set-2, generate
  1,  91,   1
** Section: B350  Profile: B350
*Beam Section, elset=Set-2, material=CONCRETE, temperature=GRADIENTS, section=RECT
350., 350.
1.,0.,0.
*End Part
**
*Part, name=LR
*Node
      1,       63000.,           0.,           0.
      2,       63000.,        5300.,           0.
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*Element, type=B31
 1,   1, 186
 2, 186, 187
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*Node
   1692,           0.,           0.,           0.
*Nset, nset=LR-RefPt_, internal
1692,
*Nset, nset=Col
    1,    2,    3,    5,    7,    9
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*Elset, elset=Col
    1,    2,    3,    4,    5,    6
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*Nset, nset=B35
    2,    3,    4,    5,    6,    7
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*Elset, elset=B35
   19,   20,   21,   22,   23,   24
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** Section: Column  Profile: Column
*Beam Section, elset=Col, material=Concrete, temperature=GRADIENTS, section=RECT
600., 600.
0.,0.,-1.
** Section: B350  Profile: B350
*Beam Section, elset=B35, material=CONCRETE, temperature=GRADIENTS, section=RECT
350., 350.
0.,0.,-1.
*End Part
**
*Part, name=Pipe1_X
*Node
      1,      -54550.,           0.,           0.
      2,      -49860.,           0.,           0.
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*Element, type=PIPE31
 1,  1, 10
 2, 10, 11
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*Nset, nset=Set-1, generate
   1,  175,    1
*Elset, elset=Set-1, generate
   1,  174,    1
** Section: P20001  Profile: P20001
*Beam Section, elset=Set-1, material=PIPE16, temperature=GRADIENTS, section=PIPE
203.2, 7.92
0.,0.,-1.
*End Part
**
*Part, name=Pipe1_Y
*Node
      1,           0.,        2840.,           0.
      2,           0.,   2740.15625,           0.
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*Element, type=PIPE31
 1,  1,  2
 2,  2,  3
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*Nset, nset=Set-1, generate
  1,  65,   1
*Elset, elset=Set-1, generate
  1,  64,   1
** Section: P20001  Profile: P20001
*Beam Section, elset=Set-1, material=PIPE16, temperature=GRADIENTS, section=PIPE
203.2, 7.92
0.,0.,-1.
*End Part
**
*Part, name=Pipe1_YZ
*Node
      1,         -60.,         -40.,           0.
      2,  -24.6446609,  -4.64466095,           0.
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*Element, type=PIPE31
 1,  1,  2
 2,  2,  3
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*Nset, nset=Set-1, generate
  1,  11,   1
*Elset, elset=Set-1, generate
  1,  10,   1
** Section: P20001  Profile: P20001
*Beam Section, elset=Set-1, material=PIPE16, temperature=GRADIENTS, section=PIPE
203.2, 7.92
0.,0.,-1.
*End Part
**
*Part, name=Pipe1_Z
*Node
      1,       12195.,           0.,           0.
      2,        8505.,           0.,           0.
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*Element, type=PIPE31
 1,  1,  5
 2,  5,  6
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*Nset, nset=Set-1, generate
  1,  57,   1
*Elset, elset=Set-1, generate
  1,  56,   1
** Section: P20001  Profile: P20001
*Beam Section, elset=Set-1, material=PIPE16, temperature=GRADIENTS, section=PIPE
203.2, 7.92
0.,0.,1.
*End Part
**
*Part, name=Pipe1_elbow45
*Node
      1,   460.667572,   155.667572,           0.
      2,    408.33783,   155.667572,           0.
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*Element, type=ELBOW32
1,   1, 152,   5
2,   5, 153,   6
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*Nset, nset=Set-1, generate
   1,  165,    1
*Elset, elset=Set-1, generate
  1,  82,   1
** Section: P20001  Profile: P20001
*Beam Section, elset=Set-1, material=PIPE16, temperature=GRADIENTS, section=ELBOW
203.2, 7.92, 610
0.,0.,1.
*End Part
**
*Part, name=Pipe1_elbow90
*Node
      1,         490.,         610.,           0.
      2,     489.9599,   603.006104,           0.
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*Element, type=ELBOW32
  1,   1, 139,   2
  2,   2, 140,   3
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*Nset, nset=Set-1, generate
   1,  275,    1
*Elset, elset=Set-1, generate
   1,  137,    1
** Section: P20001  Profile: P20001
*Beam Section, elset=Set-1, material=PIPE16, temperature=GRADIENTS, section=ELBOW
203.2, 7.92, 610
0.,0.,1.
*End Part
**
*Part, name=Pipe2_Elbow45
*Node
      1,   265.203827,   74.7038422,           0.
      2,   232.519211,   74.7038422,           0.
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*Element, type=ELBOW32
1,  1, 76,  5
2,  5, 77,  6
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*Nset, nset=Set-1, generate
   1,  149,    1
*Elset, elset=Set-1, generate
  1,  74,   1
** Section: Pipe2  Profile: Pipe2
*Beam Section, elset=Set-1, material=PIPE10, temperature=GRADIENTS, section=ELBOW
118.525, 4.19, 273
0.,0.,-1.
*End Part
**
*Part, name=Pipe2_Elbow90
*Node
      1,         186.,         381.,           0.
      2,   185.967361,   376.012878,           0.
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*Element, type=ELBOW32
  1,   1, 122,   2
  2,   2, 123,   3
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*Nset, nset=Set-1, generate
   1,  241,    1
*Elset, elset=Set-1, generate
   1,  120,    1
** Section: Pipe2  Profile: Pipe2
*Beam Section, elset=Set-1, material=PIPE10, temperature=GRADIENTS, section=ELBOW
118.525, 4.19, 273
0.,0.,1.
*End Part
**
*Part, name=Pipe2_ShortY
*Node
      1,           0.,         578.,           0.
      2,           0.,   527.384644,           0.
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*Element, type=PIPE31
 1,  1,  2
 2,  2,  3
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*Nset, nset=Set-1, generate
  1,  14,   1
*Elset, elset=Set-1, generate
  1,  13,   1
** Section: Pipe2  Profile: Pipe2
*Beam Section, elset=Set-1, material=PIPE10, temperature=GRADIENTS, section=PIPE
118.525, 4.19
0.,0.,-1.
*End Part
**
*Part, name=Pipe2_ShortZ
*Node
      1,       -1479.,           0.,           0.
      2,  -1449.01855,           0.,           0.
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*Element, type=PIPE31
 1,  1,  2
 2,  2,  3
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*Nset, nset=Set-1, generate
  1,  55,   1
*Elset, elset=Set-1, generate
  1,  54,   1
** Section: Pipe2  Profile: Pipe2
*Beam Section, elset=Set-1, material=PIPE10, temperature=GRADIENTS, section=PIPE
118.525, 4.19
0.,0.,-1.
*End Part
**
*Part, name=Pipe2_X
*Node
      1,      -13819.,           0.,           0.
      2,      -12800.,           0.,           0.
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*Element, type=PIPE31
1,  1,  7
2,  7,  8
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*Nset, nset=Set-1, generate
  1,  89,   1
*Elset, elset=Set-1, generate
  1,  88,   1
** Section: Pipe2  Profile: Pipe2
*Beam Section, elset=Set-1, material=PIPE10, temperature=GRADIENTS, section=PIPE
118.525, 4.19
0.,0.,-1.
*End Part
**
*Part, name=Pipe2_Y
*Node
      1,         -50.,        4669.,           0.
      2,         -50.,   4518.56836,           0.
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*Element, type=PIPE31
 1,  1,  2
 2,  2,  3
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*Nset, nset=Set-1, generate
  1,  45,   1
*Elset, elset=Set-1, generate
  1,  44,   1
** Section: Pipe2  Profile: Pipe2
*Beam Section, elset=Set-1, material=PIPE10, temperature=GRADIENTS, section=PIPE
118.525, 4.19
0.,0.,-1.
*End Part
**
*Part, name=Pipe2_YZ
*Node
      1,          40.,          40.,           0.
      2,   4.95661974,   4.95661974,           0.
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*Element, type=PIPE31
 1,  1,  2
 2,  2,  3
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*Nset, nset=Set-1, generate
  1,  18,   1
*Elset, elset=Set-1, generate
  1,  17,   1
** Section: Pipe2  Profile: Pipe2
*Beam Section, elset=Set-1, material=PIPE10, temperature=GRADIENTS, section=PIPE
118.525, 4.19
0.,0.,-1.
*End Part
**
*Part, name=Pipe2_Z
*Node
      1,      -11569.,           0.,           0.
      2,      -8259.5,           0.,           0.
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*Element, type=PIPE31
 1,  1,  5
 2,  5,  6
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*Nset, nset=Set-1, generate
  1,  66,   1
*Elset, elset=Set-1, generate
  1,  65,   1
** Section: Pipe2  Profile: Pipe2
*Beam Section, elset=Set-1, material=PIPE10, temperature=GRADIENTS, section=PIPE
118.525, 4.19
0.,0.,1.
*End Part
**
*Part, name=Pipe3_Elbow90
*Node
      1,       -1898.,         152.,           0.
      2,  -1898.01318,   149.993668,           0.
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*Element, type=ELBOW32
  1,   1, 121,   2
  2,   2, 122,   3
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*Nset, nset=Set-1, generate
   1,  239,    1
*Elset, elset=Set-1, generate
   1,  119,    1
** Section: Pipe3  Profile: Pipe3
*Beam Section, elset=Set-1, material=PIPE4, temperature=GRADIENTS, section=ELBOW
57.15, 3.05, 152
0.,0.,1.
*End Part
**
*Part, name=Pipe3_ShortY1
*Node
      1,           0.,         556.,           0.
      2,           0.,   536.114258,           0.
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*Element, type=PIPE31
 1,  1,  2
 2,  2,  3
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*Nset, nset=Set-1, generate
  1,  36,   1
*Elset, elset=Set-1, generate
  1,  35,   1
** Section: Pipe3  Profile: Pipe3
*Beam Section, elset=Set-1, material=PIPE4, temperature=GRADIENTS, section=PIPE
57.15, 3.05
0.,0.,1.
*End Part
**
*Part, name=Pipe3_X1
*Node
      1,       -3098.,           0.,           0.
      2,       -2620.,           0.,           0.
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*Element, type=PIPE31
 1,  1,  5
 2,  5,  6
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*Nset, nset=Set-1, generate
   1,  135,    1
*Elset, elset=Set-1, generate
   1,  134,    1
** Section: Pipe3  Profile: Pipe3
*Beam Section, elset=Set-1, material=PIPE4, temperature=GRADIENTS, section=PIPE
57.15, 3.05
0.,0.,-1.
*End Part
**
*Part, name=Pipe3_X2
*Node
      1,       -8834.,           0.,           0.
      2,       -6686.,           0.,           0.
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*Element, type=PIPE31
 1,  1,  7
 2,  7,  8
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*Nset, nset=Set-1, generate
   1,  115,    1
*Elset, elset=Set-1, generate
   1,  114,    1
** Section: Pipe3  Profile: Pipe3
*Beam Section, elset=Set-1, material=PIPE4, temperature=GRADIENTS, section=PIPE
57.15, 3.05
0.,0.,-1.
*End Part
**
*Part, name=Pipe3_Y
*Node
      1,           0.,        4598.,           0.
      2,           0.,   4497.29395,           0.
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*Element, type=PIPE31
 1,  1,  2
 2,  2,  3
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*Nset, nset=Set-1, generate
  1,  69,   1
*Elset, elset=Set-1, generate
  1,  68,   1
** Section: Pipe3  Profile: Pipe3
*Beam Section, elset=Set-1, material=PIPE4, temperature=GRADIENTS, section=PIPE
57.15, 3.05
0.,0.,1.
*End Part
**
*Part, name=Pipe3_Y2
*Node
      1,           0.,         496.,           0.
      2,           0.,   446.117645,           0.
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*Element, type=PIPE31
 1,  1,  2
 2,  2,  3
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*Nset, nset=Set-1, generate
  1,  35,   1
*Elset, elset=Set-1, generate
  1,  34,   1
** Section: Pipe3  Profile: Pipe3
*Beam Section, elset=Set-1, material=PIPE4, temperature=GRADIENTS, section=PIPE
57.15, 3.05
0.,0.,1.
*End Part
**
*Part, name=Pipe3_Y4
*Node
      1,           0.,        -528.,           0.
      2,           0.,       -557.5,           0.
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*Element, type=PIPE31
 1,  1,  2
 2,  2,  3
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*Nset, nset=Set-1, generate
  1,  17,   1
*Elset, elset=Set-1, generate
  1,  16,   1
** Section: Pipe3  Profile: Pipe3
*Beam Section, elset=Set-1, material=PIPE4, temperature=GRADIENTS, section=PIPE
57.15, 3.05
0.,0.,1.
*End Part
**
*Part, name=Pipe3_Z
*Node
      1,       12613.,           0.,           0.
      2,       11465.,           0.,           0.
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*Element, type=PIPE31
 1,  1,  8
 2,  8,  9
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*Nset, nset=Set-1, generate
   1,  140,    1
*Elset, elset=Set-1, generate
   1,  139,    1
** Section: Pipe3  Profile: Pipe3
*Beam Section, elset=Set-1, material=PIPE4, temperature=GRADIENTS, section=PIPE
57.15, 3.05
0.,0.,1.
*End Part
**
*Part, name=Pipe3_Z2
*Node
      1,        2418.,           0.,           0.
      2,   2367.83325,           0.,           0.
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*Element, type=PIPE31
  1,   1,   2
  2,   2,   3
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*Nset, nset=Set-1, generate
   1,  109,    1
*Elset, elset=Set-1, generate
   1,  108,    1
** Section: Pipe3  Profile: Pipe3
*Beam Section, elset=Set-1, material=PIPE4, temperature=GRADIENTS, section=PIPE
57.15, 3.05
0.,0.,-1.
*End Part
**
*Part, name=Pipe4_Elbow90
*Node
      1,           9.,         229.,           0.
      2,   8.96512222,   225.003403,           0.
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*Element, type=ELBOW32
 1,   1,  92,   2
 2,   2,  93,   3
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*Nset, nset=Set-1, generate
   1,  181,    1
*Elset, elset=Set-1, generate
  1,  90,   1
** Section: Pipe4  Profile: Pipe4
*Beam Section, elset=Set-1, material=PIPE6, temperature=GRADIENTS, section=ELBOW
84.14, 3.4, 229
0.,0.,1.
*End Part
**
*Part, name=Pipe4_X
*Node
      1,       36466.,           0.,           0.
      2,       35034.,           0.,           0.
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*Element, type=PIPE31
 1,  1, 12
 2, 12, 13
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*Nset, nset=Set-1, generate
   1,  415,    1
*Elset, elset=Set-1, generate
   1,  414,    1
** Section: Pipe4  Profile: Pipe4
*Beam Section, elset=Set-1, material=PIPE6, temperature=GRADIENTS, section=PIPE
84.14, 3.4
0.,0.,1.
*End Part
**
*Part, name=Pipe4_Y
*Node
      1,          50.,        3571.,           0.
      2,          50.,   3471.42651,           0.
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*Element, type=PIPE31
 1,  1,  2
 2,  2,  3
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*Nset, nset=Set-1, generate
  1,  69,   1
*Elset, elset=Set-1, generate
  1,  68,   1
** Section: Pipe4  Profile: Pipe4
*Beam Section, elset=Set-1, material=PIPE6, temperature=GRADIENTS, section=PIPE
84.14, 3.4
0.,0.,-1.
*End Part
**
*Part, name=Pipe4_Y1
*Node
      1,           0.,         611.,           0.
      2,           0.,    581.34613,           0.
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*Element, type=PIPE31
 1,  1,  2
 2,  2,  3
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*Nset, nset=Set-1, generate
  1,  27,   1
*Elset, elset=Set-1, generate
  1,  26,   1
** Section: Pipe4  Profile: Pipe4
*Beam Section, elset=Set-1, material=PIPE6, temperature=GRADIENTS, section=PIPE
84.14, 3.4
0.,0.,-1.
*End Part
**
*Part, name=Pipe4_Z
*Node
      1,       10021.,         -50.,           0.
      2,        5950.,         -50.,           0.
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*Element, type=PIPE31
 1,  1,  5
 2,  5,  6
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*Nset, nset=Set-1, generate
   1,  163,    1
*Elset, elset=Set-1, generate
   1,  162,    1
** Section: Pipe4  Profile: Pipe4
*Beam Section, elset=Set-1, material=PIPE6, temperature=GRADIENTS, section=PIPE
84.14, 3.4
0.,0.,1.
*End Part
**
*Part, name=Pipe5_Elbow45
*Node
      1,   270.073914,   41.5738983,           0.
      2,   230.869492,   41.5738983,           0.
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*Element, type=ELBOW32
1,  1, 90,  5
2,  5, 91,  6
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*Nset, nset=Set-1, generate
   1,  177,    1
*Elset, elset=Set-1, generate
  1,  88,   1
** Section: Pipe5  Profile: Pipe5
*Beam Section, elset=Set-1, material=PIPE12, temperature=GRADIENTS, section=ELBOW
161.925, 4.57, 457
0.,0.,-1.
*End Part
**
*Part, name=Pipe5_Elbow90
*Node
      1,         177.,         457.,           0.
      2,   176.946854,   450.030823,           0.
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*Element, type=ELBOW32
  1,   1, 105,   2
  2,   2, 106,   3
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*Nset, nset=Set-1, generate
   1,  207,    1
*Elset, elset=Set-1, generate
   1,  103,    1
** Section: Pipe5  Profile: Pipe5
*Beam Section, elset=Set-1, material=PIPE12, temperature=GRADIENTS, section=ELBOW
161.925, 4.57, 457
0.,0.,1.
*End Part
**
*Part, name=Pipe5_X
*Node
      1,       41100.,           0.,           0.
      2,       37572.,           0.,           0.
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*Element, type=PIPE31
 1,  1, 11
 2, 11, 12
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*Nset, nset=Set-1, generate
   1,  309,    1
*Elset, elset=Set-1, generate
   1,  308,    1
** Section: Pipe5  Profile: Pipe5
*Beam Section, elset=Set-1, material=PIPE12, temperature=GRADIENTS, section=PIPE
161.925, 4.57
0.,0.,1.
*End Part
**
*Part, name=Pipe5_Y
*Node
      1,           0.,        4943.,           0.
      2,           0.,   4794.29541,           0.
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*Element, type=PIPE31
 1,  1,  2
 2,  2,  3
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*Nset, nset=Set-1, generate
  1,  45,   1
*Elset, elset=Set-1, generate
  1,  44,   1
** Section: Pipe5  Profile: Pipe5
*Beam Section, elset=Set-1, material=PIPE12, temperature=GRADIENTS, section=PIPE
161.925, 4.57
0.,0.,-1.
*End Part
**
*Part, name=Pipe5_YZ
*Node
      1,          40.,          40.,           0.
      2,     22.23699,     22.23699,           0.
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*Element, type=PIPE31
 1,  1,  2
 2,  2,  3
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*Nset, nset=Set-1, generate
  1,  30,   1
*Elset, elset=Set-1, generate
  1,  29,   1
** Section: Pipe5  Profile: Pipe5
*Beam Section, elset=Set-1, material=PIPE12, temperature=GRADIENTS, section=PIPE
161.925, 4.57
0.,0.,-1.
*End Part
**
*Part, name=Pipe5_Z
*Node
      1,       9321.5,           0.,           0.
      2,       5478.5,           0.,           0.
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*Element, type=PIPE31
 1,  1,  5
 2,  5,  6
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*Nset, nset=Set-1, generate
  1,  98,   1
*Elset, elset=Set-1, generate
  1,  97,   1
** Section: Pipe5  Profile: Pipe5
*Beam Section, elset=Set-1, material=PIPE12, temperature=GRADIENTS, section=PIPE
161.925, 4.57
0.,0.,1.
*End Part
**
*Part, name=Pipe6_Elbow90
*Node
      1,         145.,         305.,           0.
      2,   144.959167,   300.009674,           0.
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*Element, type=ELBOW32
 1,   1,  98,   2
 2,   2,  99,   3
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*Nset, nset=Set-1, generate
   1,  193,    1
*Elset, elset=Set-1, generate
  1,  96,   1
** Section: Pipe6  Profile: Pipe6
*Beam Section, elset=Set-1, material=PIPE8, temperature=GRADIENTS, section=ELBOW
109.54, 3.76, 305
0.,0.,1.
*End Part
**
*Part, name=Pipe6_Y
*Node
      1,           0.,        4295.,           0.
      2,           0.,   4195.07471,           0.
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*Element, type=PIPE31
 1,  1,  2
 2,  2,  3
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*Nset, nset=Set-1, generate
  1,  68,   1
*Elset, elset=Set-1, generate
  1,  67,   1
** Section: Pipe6  Profile: Pipe6
*Beam Section, elset=Set-1, material=PIPE8, temperature=GRADIENTS, section=PIPE
109.54, 3.76
0.,0.,-1.
*End Part
**
*Part, name=Pipe6_Y2
*Node
      1,           0.,        1660.,           0.
      2,           0.,        1610.,           0.
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*Element, type=PIPE31
 1,  1,  2
 2,  2,  3
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*Nset, nset=Set-1, generate
  1,  37,   1
*Elset, elset=Set-1, generate
  1,  36,   1
** Section: Pipe6  Profile: Pipe6
*Beam Section, elset=Set-1, material=PIPE8, temperature=GRADIENTS, section=PIPE
109.54, 3.76
0.,0.,-1.
*End Part
**
*Part, name=Pipe6_Z
*Node
      1,       10395.,           0.,           0.
      2,        6400.,           0.,           0.
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*Element, type=PIPE31
 1,  1,  5
 2,  5,  6
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*Nset, nset=Set-1, generate
   1,  156,    1
*Elset, elset=Set-1, generate
   1,  155,    1
** Section: Pipe6  Profile: Pipe6
*Beam Section, elset=Set-1, material=PIPE8, temperature=GRADIENTS, section=PIPE
109.54, 3.76
0.,0.,1.
*End Part
**
*Part, name=Pipe6_Z2
*Node
      1,       -3005.,           0.,           0.
      2,  -2955.07471,           0.,           0.
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*Element, type=PIPE31
 1,  1,  2
 2,  2,  3
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*Nset, nset=Set-1, generate
  1,  68,   1
*Elset, elset=Set-1, generate
  1,  67,   1
** Section: Pipe6  Profile: Pipe6
*Beam Section, elset=Set-1, material=PIPE8, temperature=GRADIENTS, section=PIPE
109.54, 3.76
0.,0.,1.
*End Part
**
*Part, name=Pipe7_Elbow90
*Node
      1,          29.,         229.,           0.
      2,   28.9651222,   225.003403,           0.
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*Element, type=ELBOW32
 1,   1,  92,   2
 2,   2,  93,   3
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*Nset, nset=Set-1, generate
   1,  181,    1
*Elset, elset=Set-1, generate
  1,  90,   1
** Section: Pipe7  Profile: Pipe7
*Beam Section, elset=Set-1, material=PIPE6, temperature=GRADIENTS, section=ELBOW
84.14, 3.4, 229
0.,0.,1.
*End Part
**
*Part, name=Pipe7_X
*Node
      1,        1555.,        -400.,           0.
      2,        -566.,        -400.,           0.
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*Element, type=PIPE31
 1,  1,  4
 2,  4,  5
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*Nset, nset=Set-1, generate
  1,  59,   1
*Elset, elset=Set-1, generate
  1,  58,   1
** Section: Pipe7  Profile: Pipe7
*Beam Section, elset=Set-1, material=PIPE6, temperature=GRADIENTS, section=PIPE
84.14, 3.4
0.,0.,1.
*End Part
**
*Part, name=Pipe7_Y
*Node
      1,           0.,        4171.,           0.
      2,           0.,   4020.53345,           0.
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*Element, type=PIPE31
 1,  1,  2
 2,  2,  3
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*Nset, nset=Set-1, generate
  1,  46,   1
*Elset, elset=Set-1, generate
  1,  45,   1
** Section: Pipe7  Profile: Pipe7
*Beam Section, elset=Set-1, material=PIPE6, temperature=GRADIENTS, section=PIPE
84.14, 3.4
0.,0.,-1.
*End Part
**
*Part, name=Pipe7_Y1
*Node
      1,           0.,         462.,           0.
      2,           0.,   431.888885,           0.
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*Element, type=PIPE31
 1,  1,  2
 2,  2,  3
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*Nset, nset=Set-1, generate
  1,  19,   1
*Elset, elset=Set-1, generate
  1,  18,   1
** Section: Pipe7  Profile: Pipe7
*Beam Section, elset=Set-1, material=PIPE6, temperature=GRADIENTS, section=PIPE
84.14, 3.4
0.,0.,-1.
*End Part
**
*Part, name=Pipe7_Y2
*Node
      1,           0.,         764.,           0.
      2,           0.,   733.709656,           0.
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*Element, type=PIPE31
 1,  1,  2
 2,  2,  3
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*Nset, nset=Set-1, generate
  1,  32,   1
*Elset, elset=Set-1, generate
  1,  31,   1
** Section: Pipe7  Profile: Pipe7
*Beam Section, elset=Set-1, material=PIPE6, temperature=GRADIENTS, section=PIPE
84.14, 3.4
0.,0.,-1.
*End Part
**
*Part, name=Pipe7_Z
*Node
      1,      -11071.,         -50.,           0.
      2,       -7550.,         -50.,           0.
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*Element, type=PIPE31
 1,  1,  5
 2,  5,  6
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*Nset, nset=Set-1, generate
   1,  167,    1
*Elset, elset=Set-1, generate
   1,  166,    1
** Section: Pipe7  Profile: Pipe7
*Beam Section, elset=Set-1, material=PIPE6, temperature=GRADIENTS, section=PIPE
84.14, 3.4
0.,0.,1.
*End Part
**
*Part, name=Pipe7_Z1
*Node
      1,       -1471.,           0.,           0.
      2,  -1440.98804,           0.,           0.
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*Element, type=PIPE31
 1,  1,  2
 2,  2,  3
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*Nset, nset=Set-1, generate
  1,  85,   1
*Elset, elset=Set-1, generate
  1,  84,   1
** Section: Pipe7  Profile: Pipe7
*Beam Section, elset=Set-1, material=PIPE6, temperature=GRADIENTS, section=PIPE
84.14, 3.4
0.,0.,1.
*End Part
**
*Part, name=SR
*Node
      1,       12000.,           0.,           0.
      2,       12000.,        6300.,           0.
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*Element, type=B31
 1,  1, 17
 2, 17, 18
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*Node
    349,           0.,           0.,           0.
*Nset, nset=SR-RefPt_, internal
349,
*Nset, nset=Col
   1,   2,   3,   6,   7,   8
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*Elset, elset=Col
   1,   2,   3,   4,   5,   6
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*Nset, nset=B35
   2,   7,  10,  15, 108, 109
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*Elset, elset=B35
  98,  99, 100, 101, 102, 103
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*Nset, nset=B70
   3,   4,   5,   6,  11,  12
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*Elset, elset=B70
  43,  44,  45,  46,  47,  48
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** Section: Column  Profile: Column
*Beam Section, elset=Col, material=Concrete, temperature=GRADIENTS, section=RECT
600., 600.
0.,0.,1.
** Section: B700  Profile: B700
*Beam Section, elset=B70, material=CONCRETE, temperature=GRADIENTS, section=RECT
350., 700.
0.,0.,-1.
** Section: B350  Profile: B350
*Beam Section, elset=B35, material=CONCRETE, temperature=GRADIENTS, section=RECT
350., 350.
0.,0.,-1.
*End Part
**
**
** ASSEMBLY
**
*Assembly, name=Assembly
**
*Instance, name=Beams-SR-1, part=Beams-SR
      42000.,        6500.,           0.
      42000.,        6500.,           0., 42000.5773502795, 6500.57735027955, 0.577350279552042, 119.999999109416
*End Instance
**
*Instance, name=SR-1, part=SR
      42000.,        6500.,           0.
      42000.,        6500.,           0., 42000.5773502795, 6500.57735027955, 0.577350279552042, 119.999999109416
*End Instance
**
*Instance, name=LR-1, part=LR
      39000.,        6500.,           0.
      39000.,        6500.,           0.,       39001.,        6500.,           0.,          90.
*End Instance
**
*Instance, name=Beams-LR-1, part=Beams-LR
      39000.,        6500.,           0.
      39000.,        6500.,           0.,       39001.,        6500.,           0.,          90.
*End Instance
**
*Instance, name=Pipe1_Z-1, part=Pipe1_Z
      42700.,        6995.,       8678.2
      42700.,        6995.,       8678.2, 42700.5773502795, 6995.57735027955, 8678.77735027955, 119.999999109416
*End Instance
**
*Instance, name=Pipe1_elbow90-1, part=Pipe1_elbow90
      42700.,       19310.,       8678.2
      42700.,       19310.,       8678.2, 42700.5773502795, 19310.5773502796, 8678.77735027955, 119.999999109416
*End Instance
**
*Instance, name=Pipe1_Y-1, part=Pipe1_Y
      42700.,       19800.,      12838.2
      42700.,       19800.,      12838.2,       42701.,       19800.,      12838.2,          90.
*End Instance
**
*Instance, name=Pipe1_elbow45-1, part=Pipe1_elbow45
      42700., 1844.3324318262,  8522.532432
      42700., 1844.3324318262,  8522.532432, 42700.5773502796, 1844.90978210575, 8523.10978227955, 119.999999109416
*End Instance
**
*Instance, name=Pipe1_YZ-1, part=Pipe1_YZ
      42700., 1490.7790410593,  8148.979041
      42700., 1490.7790410593,  8148.979041, 42700.5773502796, 1491.35639133885, 8149.55639127955, 119.999999109416
*End Instance
**
*Instance, name=Pipe1_elbow90-3, part=Pipe1_elbow90
      43190., 999.443904439098, 7677.6439039835
      43190., 999.443904439098, 7677.6439039835,       43190., 1000.36778399837, 7678.02658743245,         180.
*End Instance
**
*Instance, name=Pipe1_X-1, part=Pipe1_X
      97860.,   999.443904,  7677.643904
      97860.,   999.443904,  7677.643904,       97861.,   999.443904,  7677.643904,          90.
*End Instance
**
*Instance, name=Pipe2_Z-1, part=Pipe2_Z
      43600.,      14759.5,     8611.525
      43600.,      14759.5,     8611.525, 43600.5773502795, 14760.0773502796, 8612.10235027955, 119.999999109416
*End Instance
**
*Instance, name=Pipe2_Elbow90-1, part=Pipe2_Elbow90
      43600.,       19614.,     8611.525
      43600.,       19614.,     8611.525, 43600.5773502796, 19614.5773502796, 8612.10235027955, 119.999999109416
*End Instance
**
*Instance, name=Pipe2_Y-1, part=Pipe2_Y
      43650.,       19800.,    10942.525
      43650.,       19800.,    10942.525,       43651.,       19800.,    10942.525,          90.
*End Instance
**
*Instance, name=Pipe2_Elbow45-1, part=Pipe2_Elbow45
      43600., 2925.2961581816,  8536.821158
      43600., 2925.2961581816,  8536.821158, 43600.5773502796, 2925.87350846115, 8537.39850827955, 119.999999109416
*End Instance
**
*Instance, name=Pipe2_YZ-1, part=Pipe2_YZ
      43600., 2825.29615857231,  8436.821158
      43600., 2825.29615857231,  8436.821158, 43600.5773502796, 2825.87350885186, 8437.39850827955, 119.999999109416
*End Instance
**
*Instance, name=Pipe2_Elbow90-2, part=Pipe2_Elbow90
      43786., 2000.15101186422, 7611.67601155838
      43786., 2000.15101186422, 7611.67601155838,       43786., 2001.07489142349, 7612.05869500733,         180.
*End Instance
**
*Instance, name=Pipe2_X-1, part=Pipe2_X
      57800.,  2000.151012,  7611.676012
      57800.,  2000.151012,  7611.676012,       57801.,  2000.151012,  7611.676012,          90.
*End Instance
**
*Instance, name=Pipe2_Elbow90-3, part=Pipe2_Elbow90
      61764.,  2000.151012,  7611.676012
      61764.,  2000.151012,  7611.676012,       61763.,  2000.151012,  7611.676012,          90.
*End Instance
**
*Instance, name=Pipe2_ShortY-1, part=Pipe2_ShortY
      61950.,  2000.151012,  6652.676012
      61950.,  2000.151012,  6652.676012,       61951.,  2000.151012,  6652.676012,          90.
*End Instance
**
*Instance, name=Pipe2_Elbow90-4, part=Pipe2_Elbow90
      61950., 1814.15101200001,  6191.676012
      61950., 1814.15101200001,  6191.676012, 61950.5773502796, 1814.72836227956, 6192.25336227955, 119.999999109416
*End Instance
**
*Instance, name=Pipe2_ShortZ-1, part=Pipe2_ShortZ
      61950., 1479.15101199999,  6191.676012
      61950., 1479.15101199999,  6191.676012, 61950.5773502796, 1479.72836227955, 6192.25336227955, 119.999999109416
*End Instance
**
*Instance, name=Pipe3_Z-1, part=Pipe3_Z
      44370., 7035.00000000001,      8532.15
      44370., 7035.00000000001,      8532.15, 44370.5773502796, 7035.57735027956, 8532.72735027955, 119.999999109416
*End Instance
**
*Instance, name=Pipe3_Elbow90-1, part=Pipe3_Elbow90
      44370.,       21698.,      8532.15
      44370.,       21698.,      8532.15, 44370.5773502796, 21698.5773502795, 8532.72735027955, 119.999999109416
*End Instance
**
*Instance, name=Pipe3_Y-1, part=Pipe3_Y
      44370.,       19800.,     10934.15
      44370.,       19800.,     10934.15,       44371.,       19800.,     10934.15,          90.
*End Instance
**
*Instance, name=Pipe3_Elbow90-2, part=Pipe3_Elbow90
      44370.,        3672.,      8532.15
      44370.,        3672.,      8532.15, 44369.4226497205, 3672.57735027956, 8531.57264972045, 119.999999109416
*End Instance
**
*Instance, name=Pipe3_ShortY1-1, part=Pipe3_ShortY1
      44370.,        5570.,      7824.15
      44370.,        5570.,      7824.15,       44371.,        5570.,      7824.15,          90.
*End Instance
**
*Instance, name=Pipe3_Elbow90-3, part=Pipe3_Elbow90
      42472.,        5570.,      7532.15
      42472.,        5570.,      7532.15,       42472., 5570.70710681123, 7532.85710681123,         180.
*End Instance
**
*Instance, name=Pipe3_X1-1, part=Pipe3_X1
      47620.,        5570.,      7532.15
      47620.,        5570.,      7532.15,       47621.,        5570.,      7532.15,          90.
*End Instance
**
*Instance, name=Pipe3_Elbow90-4, part=Pipe3_Elbow90
      50598.,        5570.,      7532.15
      50598.,        5570.,      7532.15,       50597.,        5570.,      7532.15,          90.
*End Instance
**
*Instance, name=Pipe3_Y2-1, part=Pipe3_Y2
      48700.,        5570.,      6884.15
      48700.,        5570.,      6884.15,       48701.,        5570.,      6884.15,          90.
*End Instance
**
*Instance, name=Pipe3_Elbow90-5, part=Pipe3_Elbow90
      46802.,        5570.,      5532.15
      46802.,        5570.,      5532.15,       46802., 5570.70710681123, 5532.85710681123,         180.
*End Instance
**
*Instance, name=Pipe3_X2-1, part=Pipe3_X2
      57686.,        5570.,      5532.15
      57686.,        5570.,      5532.15,       57687.,        5570.,      5532.15,          90.
*End Instance
**
*Instance, name=Pipe3_Elbow90-6, part=Pipe3_Elbow90
      62386.,        5570.,      5532.15
      62386.,        5570.,      5532.15,       62387.,        5570.,      5532.15,          90.
*End Instance
**
*Instance, name=Pipe3_Y4-1, part=Pipe3_Y4
      60488.,        5570.,      6684.15
      60488.,        5570.,      6684.15,       60489.,        5570.,      6684.15,          90.
*End Instance
**
*Instance, name=Pipe3_Elbow90-7, part=Pipe3_Elbow90
      60488.,        5570.,      8206.15
      60488.,        5570.,      8206.15, 60488.7071068112,        5570., 8206.85710681123,         180.
*End Instance
**
*Instance, name=Pipe3_Z2-1, part=Pipe3_Z2
      60488.,        3000.,      6308.15
      60488.,        3000.,      6308.15, 60488.5773502796, 3000.57735027956, 6308.72735027955, 119.999999109416
*End Instance
**
*Instance, name=Pipe5_Z-1, part=Pipe5_Z
      45985.,      10021.5,     8636.925
      45985.,      10021.5,     8636.925, 45985.5773502796, 10022.0773502795, 8637.50235027955, 119.999999109416
*End Instance
**
*Instance, name=Pipe5_Elbow90-1, part=Pipe5_Elbow90
      45985.,       19623.,     8636.925
      45985.,       19623.,     8636.925, 45985.5773502796, 19623.5773502795, 8637.50235027955, 119.999999109416
*End Instance
**
*Instance, name=Pipe5_Y-1, part=Pipe5_Y
      45985.,       19800.,    10693.925
      45985.,       19800.,    10693.925,       45986.,       19800.,    10693.925,          90.
*End Instance
**
*Instance, name=Pipe5_Elbow45-1, part=Pipe5_Elbow45
      45985., 4608.4261003574,    8595.3511
      45985., 4608.4261003574,    8595.3511, 45985.5773502796, 4609.00345063695, 8595.92845027955, 119.999999109416
*End Instance
**
*Instance, name=Pipe5_YZ-1, part=Pipe5_YZ
      45985., 4448.4261001038,    8435.3511
      45985., 4448.4261001038,    8435.3511, 45985.5773502796, 4449.00345038335, 8435.92845027955, 119.999999109416
*End Instance
**
*Instance, name=Pipe5_Elbow90-2, part=Pipe5_Elbow90
      45808., 3650.1510109835, 7637.0760104391
      45808., 3650.1510109835, 7637.0760104391,       45809., 3650.1510109835, 7637.0760104391, 45.0000005824897
*End Instance
**
*Instance, name=Pipe5_X-1, part=Pipe5_X
       4428.,  3650.151011,   7637.07601
       4428.,  3650.151011,   7637.07601,        4429.,  3650.151011,   7637.07601,          90.
*End Instance
**
*Instance, name=Pipe6_Z-1, part=Pipe6_Z
      46600.,        9100.,      8584.54
      46600.,        9100.,      8584.54, 46600.5773502796, 9100.57735027955, 8585.11735027955, 119.999999109416
*End Instance
**
*Instance, name=Pipe6_Elbow90-1, part=Pipe6_Elbow90
      46600.,       19655.,      8584.54
      46600.,       19655.,      8584.54, 46600.5773502796, 19655.5773502796, 8585.11735027955, 119.999999109416
*End Instance
**
*Instance, name=Pipe6_Elbow90-2, part=Pipe6_Elbow90
      46600.,        3795.,      8584.54
      46600.,        3795.,      8584.54, 46599.4226497205, 3795.57735027955, 8583.96264972045, 119.999999109416
*End Instance
**
*Instance, name=Pipe6_Y-1, part=Pipe6_Y
      46600.,       19800.,     11289.54
      46600.,       19800.,     11289.54,       46601.,       19800.,     11289.54,          90.
*End Instance
**
*Instance, name=Pipe6_Y2-1, part=Pipe6_Y2
      46600.,        3650.,      6619.54
      46600.,        3650.,      6619.54,       46601.,        3650.,      6619.54,          90.
*End Instance
**
*Instance, name=Pipe6_Elbow90-3, part=Pipe6_Elbow90
      46600.,        3505.,      6174.54
      46600.,        3505.,      6174.54, 46600.5773502796, 3505.57735027955, 6175.11735027955, 119.999999109416
*End Instance
**
*Instance, name=Pipe6_Z2-1, part=Pipe6_Z2
      46600.,        3005.,      6174.54
      46600.,        3005.,      6174.54, 46600.5773502796, 3005.57735027955, 6175.11735027955, 119.999999109416
*End Instance
**
*Instance, name=Pipe7_Z-1, part=Pipe7_Z
      47350.,       14050.,      8609.14
      47350.,       14050.,      8609.14, 47350.5773502796, 14050.5773502795, 8609.71735027955, 119.999999109416
*End Instance
**
*Instance, name=Pipe7_Elbow90-1, part=Pipe7_Elbow90
      47350., 2779.00000000001,      8559.14
      47350., 2779.00000000001,      8559.14, 47349.4226497205, 2779.57735027956, 8558.56264972045, 119.999999109416
*End Instance
**
*Instance, name=Pipe7_Elbow90-2, part=Pipe7_Elbow90
      47350.,       19771.,      8559.14
      47350.,       19771.,      8559.14, 47350.5773502796, 19771.5773502795, 8559.71735027955, 119.999999109416
*End Instance
**
*Instance, name=Pipe7_Y-1, part=Pipe7_Y
      47350.,       19800.,     11388.14
      47350.,       19800.,     11388.14,       47351.,       19800.,     11388.14,          90.
*End Instance
**
*Instance, name=Pipe7_Y1-1, part=Pipe7_Y1
      47350.,        2750.,      7868.14
      47350.,        2750.,      7868.14,       47351.,        2750.,      7868.14,          90.
*End Instance
**
*Instance, name=Pipe7_Elbow90-3, part=Pipe7_Elbow90
      47321.,        2750.,      7559.14
      47321.,        2750.,      7559.14,       47322.,        2750.,      7559.14,          90.
*End Instance
**
*Instance, name=Pipe7_X-1, part=Pipe7_X
      45566.,        2750.,      7959.14
      45566.,        2750.,      7959.14,       45567.,        2750.,      7959.14,          90.
*End Instance
**
*Instance, name=Pipe7_Elbow90-4, part=Pipe7_Elbow90
      44595.,        2750.,      7559.14
      44595.,        2750.,      7559.14,       44595., 2749.29289318877, 7559.84710681123,         180.
*End Instance
**
*Instance, name=Pipe7_Y2-1, part=Pipe7_Y2
      44566.,        2750.,      6566.14
      44566.,        2750.,      6566.14,       44567.,        2750.,      6566.14,          90.
*End Instance
**
*Instance, name=Pipe7_Elbow90-5, part=Pipe7_Elbow90
      44566., 2720.99999999999,      6162.14
      44566., 2720.99999999999,      6162.14, 44566.5773502796, 2721.57735027955, 6162.71735027955, 119.999999109416
*End Instance
**
*Instance, name=Pipe7_Z1-1, part=Pipe7_Z1
      44566., 1471.00000000001,      6162.14
      44566., 1471.00000000001,      6162.14, 44566.5773502796, 1471.57735027956, 6162.71735027955, 119.999999109416
*End Instance
**
*Instance, name=Pipe4_Z-1, part=Pipe4_Z
      45535.,        9550.,      8609.14
      45535.,        9550.,      8609.14, 45535.5773502796, 9550.57735027955, 8609.71735027955, 119.999999109416
*End Instance
**
*Instance, name=Pipe4_Elbow90-1, part=Pipe4_Elbow90
      45535.,       19791.,      8559.14
      45535.,       19791.,      8559.14, 45535.5773502796, 19791.5773502795, 8559.71735027955, 119.999999109416
*End Instance
**
*Instance, name=Pipe4_Elbow90-2, part=Pipe4_Elbow90
      45535., 3209.00000000001,      8559.14
      45535., 3209.00000000001,      8559.14, 45534.4226497205, 3209.57735027956, 8558.56264972045, 119.999999109416
*End Instance
**
*Instance, name=Pipe4_Y-1, part=Pipe4_Y
      45485.,       19800.,     11988.14
      45485.,       19800.,     11988.14,       45486.,       19800.,     11988.14,          90.
*End Instance
**
*Instance, name=Pipe4_Y1-1, part=Pipe4_Y1
      45535.,        3200.,      7719.14
      45535.,        3200.,      7719.14,       45536.,        3200.,      7719.14,          90.
*End Instance
**
*Instance, name=Pipe4_X-1, part=Pipe4_X
      12966.,        3200.,      7559.14
      12966.,        3200.,      7559.14,       12967.,        3200.,      7559.14,          90.
*End Instance
**
*Element, type=CONN3D2
1, SR-1.2, Beams-SR-1.1
2, SR-1.3, Beams-SR-1.17
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*Connector Section, elset=Connector-SR
Beam,
*Element, type=CONN3D2
13, Beams-LR-1.28, LR-1.56
14, Beams-LR-1.172, LR-1.100
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*Connector Section, elset=Connector-LR
Beam,
*Element, type=CONN3D2
152, Beams-LR-1.51, LR-1.55
*Connector Section, elset=Connector-LR-extra
Beam,
*Element, type=CONN3D2
153, Pipe1_elbow90-3.138, Pipe1_X-1.1
154, Pipe1_elbow90-3.1, Pipe1_YZ-1.1
155, Pipe1_YZ-1.11, Pipe1_elbow45-1.4
156, Pipe1_elbow45-1.1, Pipe1_Z-1.4
157, Pipe1_Z-1.1, Pipe1_elbow90-1.138
158, Pipe1_elbow90-1.1, Pipe1_Y-1.65
*Connector Section, elset=Connector-P20001
Beam,
*Element, type=CONN3D2
159, Pipe2_ShortZ-1.55, Pipe2_Elbow90-4.121
160, Pipe2_ShortY-1.14, Pipe2_Elbow90-4.1
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*Connector Section, elset=Connector-Pipe2
Beam,
*Element, type=CONN3D2
169, Pipe3_Z2-1.1, Pipe3_Elbow90-7.1
170, Pipe3_Y4-1.1, Pipe3_Elbow90-7.120
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*Connector Section, elset=Connector-pipe3
Beam,
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*Connector Section, elset=Connector-Pipe5
Beam,
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*Connector Section, elset=Connector-Pipe6
Beam,
*Element, type=CONN3D2
195, Pipe7_Z1-1.85, Pipe7_Elbow90-5.91
196, Pipe7_Elbow90-5.1, Pipe7_Y2-1.32
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*Connector Section, elset=Connector-pipe7
Beam,
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*Connector Section, elset=Connector-Pipe4
Beam,
*Nset, nset=BC, instance=SR-1
  1,  8,  9, 16
*Nset, nset=BC, instance=LR-1
   1,  43,  47,  50,  57,  58
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*Nset, nset=Connector-LR, instance=Beams-LR-1
   1,   2,   4,   5,   6,   8
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*Nset, nset=Connector-LR, instance=LR-1
   2,   3,   4,   5,   6,   7
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*Elset, elset=Connector-LR, generate
  13,  151,    1
*Nset, nset=Connector-LR-extra, instance=Beams-LR-1
 51,
*Nset, nset=Connector-LR-extra, instance=LR-1
 55,
*Elset, elset=Connector-LR-extra
 152,
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*Elset, elset=Connector-P20001, generate
 153,  158,    1
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*Elset, elset=Connector-Pipe2, generate
 159,  168,    1
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*Elset, elset=Connector-Pipe4, generate
 205,  209,    1
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*Elset, elset=Connector-Pipe5, generate
 183,  188,    1
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*Elset, elset=Connector-Pipe6, generate
 189,  194,    1
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*Elset, elset=Connector-SR, generate
  1,  12,   1
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*Elset, elset=Connector-pipe3, generate
 169,  182,    1
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*Elset, elset=Connector-pipe7, generate
 195,  204,    1
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*Elset, elset=LineLoad, instance=Beams-SR-1, generate
 16,  76,   1
*Elset, elset=LineLoad, instance=LR-1, generate
 161,  176,    1
*Elset, elset=LineLoad, instance=Beams-LR-1
   33,   34,   35,   36,   37,   38
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*Nset, nset=P1-S1-Master, instance=Beams-SR-1
 13,
*Nset, nset=P1-S1-slave, instance=Pipe1_Z-1
 2,
*Nset, nset=P1-S2-Master, instance=LR-1
 29,
*Nset, nset=P1-S2-slave, instance=Pipe1_Z-1
 3,
*Nset, nset=P1-S3-Master, instance=Beams-LR-1
 19,
*Nset, nset=P1-S3-slave, instance=Pipe1_X-1
 2,
*Nset, nset=P1-S4-Master, instance=Beams-LR-1
 17,
*Nset, nset=P1-S4-slave, instance=Pipe1_X-1
 3,
*Nset, nset=P1-S5-master, instance=Beams-LR-1
 54,
*Nset, nset=P1-S5-slave, instance=Pipe1_X-1
 4,
*Nset, nset=P1-S6-Master, instance=Beams-LR-1
 81,
*Nset, nset=P1-S6-slave, instance=Pipe1_X-1
 5,
*Nset, nset=P1-S7-master, instance=Beams-LR-1
 114,
*Nset, nset=P1-S7-slave, instance=Pipe1_X-1
 6,
*Nset, nset=P1-S8-master, instance=Beams-LR-1
 143,
*Nset, nset=P1-S8-slave, instance=Pipe1_X-1
 7,
*Nset, nset=P1-S9-master, instance=Beams-LR-1
 162,
*Nset, nset=P1-S9-slave, instance=Pipe1_X-1
 8,
*Nset, nset=P2-S1-Master, instance=Beams-SR-1
 12,
*Nset, nset=P2-S1-slave, instance=Pipe2_Z-1
 3,
*Nset, nset=P2-S2-master, instance=LR-1
 28,
*Nset, nset=P2-S2-slave, instance=Pipe2_Z-1
 2,
*Nset, nset=P2-S3-M, instance=Beams-LR-1
 33,
*Nset, nset=P2-S3-S, instance=Pipe2_X-1
 2,
*Nset, nset=P2-S4-M, instance=Beams-LR-1
 21,
*Nset, nset=P2-S4-S, instance=Pipe2_X-1
 3,
*Nset, nset=P2-S5-M, instance=Beams-LR-1
 7,
*Nset, nset=P2-S5-S, instance=Pipe2_X-1
 4,
*Nset, nset=P2-S6-M, instance=Beams-LR-1
 31,
*Nset, nset=P2-S6-S, instance=Pipe2_X-1
 5,
*Nset, nset=P3-S1-M, instance=Beams-SR-1
 15,
*Nset, nset=P3-S1-S, instance=Pipe3_Z-1
 2,
*Nset, nset=P3-S2-M, instance=Beams-SR-1
 11,
*Nset, nset=P3-S2-S, instance=Pipe3_Z-1
 3,
*Nset, nset=P3-S3-M, instance=Beams-SR-1
 18,
*Nset, nset=P3-S3-S, instance=Pipe3_Z-1
 4,
*Nset, nset=P3-S4-M, instance=Beams-SR-1
 3,
*Nset, nset=P3-S4-S, instance=Pipe3_Z-1
 5,
*Nset, nset=P3-S5-M, instance=LR-1
 27,
*Nset, nset=P3-S5-S, instance=Pipe3_Z-1
 6,
*Nset, nset=P3-S6-M, instance=Beams-LR-1
 36,
*Nset, nset=P3-S6-S, instance=Pipe3_X1-1
 2,
*Nset, nset=P3-S7-M, instance=Beams-LR-1
 23,
*Nset, nset=P3-S7-S, instance=Pipe3_X1-1
 3,
*Nset, nset=P3-S8-M, instance=Beams-LR-1
 3,
*Nset, nset=P3-S8-S, instance=Pipe3_X2-1
 2,
*Nset, nset=P3-S9-M, instance=Beams-LR-1
 11,
*Nset, nset=P3-S9-S, instance=Pipe3_X2-1
 3,
*Nset, nset=P3-S10-M, instance=Beams-LR-1
 25,
*Nset, nset=P3-S10-S, instance=Pipe3_X2-1
 4,
*Nset, nset=P3-S11-M, instance=Beams-LR-1
 38,
*Nset, nset=P3-S11-S, instance=Pipe3_X2-1
 5,
*Nset, nset=P4-S1-M, instance=Beams-SR-1
 10,
*Nset, nset=P4-S1-S, instance=Pipe4_Z-1
 2,
*Nset, nset=P4-S2-M, instance=LR-1
 26,
*Nset, nset=P4-S2-S, instance=Pipe4_Z-1
 3,
*Nset, nset=P4-S3-M, instance=Beams-LR-1
 22,
*Nset, nset=P4-S3-S, instance=Pipe4_X-1
 2,
*Nset, nset=P4-S4-M, instance=Beams-LR-1
 47,
*Nset, nset=P4-S4-S, instance=Pipe4_X-1
 4,
*Nset, nset=P4-S5-M, instance=Beams-LR-1
 66,
*Nset, nset=P4-S5-S, instance=Pipe4_X-1
 5,
*Nset, nset=P4-S6-M, instance=Beams-LR-1
 85,
*Nset, nset=P4-S6-S, instance=Pipe4_X-1
 6,
*Nset, nset=P4-S7-M, instance=Beams-LR-1
 103,
*Nset, nset=P4-S7-S, instance=Pipe4_X-1
 7,
*Nset, nset=P4-S8-M, instance=Beams-LR-1
 122,
*Nset, nset=P4-S8-S, instance=Pipe4_X-1
 8,
*Nset, nset=P4-S9-M, instance=Beams-LR-1
 136,
*Nset, nset=P4-S9-S, instance=Pipe4_X-1
 9,
*Nset, nset=P4-S10-M, instance=Beams-LR-1
 151,
*Nset, nset=P4-S10-S, instance=Pipe4_X-1
 10,
*Nset, nset=P5-S1-M, instance=Beams-SR-1
 9,
*Nset, nset=P5-S1-S, instance=Pipe5_Z-1
 2,
*Nset, nset=P5-S2-M, instance=LR-1
 25,
*Nset, nset=P5-S2-S, instance=Pipe5_Z-1
 3,
*Nset, nset=P5-S3-M, instance=Beams-LR-1
 46,
*Nset, nset=P5-S3-S, instance=Pipe5_X-1
 2,
*Nset, nset=P5-S4-M, instance=Beams-LR-1
 65,
*Nset, nset=P5-S4-S, instance=Pipe5_X-1
 3,
*Nset, nset=P5-S5-M, instance=Beams-LR-1
 84,
*Nset, nset=P5-S5-S, instance=Pipe5_X-1
 4,
*Nset, nset=P5-S6-M, instance=Beams-LR-1
 102,
*Nset, nset=P5-S6-S, instance=Pipe5_X-1
 5,
*Nset, nset=P5-S7-M, instance=Beams-LR-1
 121,
*Nset, nset=P5-S7-S, instance=Pipe5_X-1
 6,
*Nset, nset=P5-S8-M, instance=Beams-LR-1
 135,
*Nset, nset=P5-S8-S, instance=Pipe5_X-1
 7,
*Nset, nset=P5-S9-M, instance=Beams-LR-1
 169,
*Nset, nset=P5-S9-S, instance=Pipe5_X-1
 8,
*Nset, nset=P5-S10-M, instance=Beams-LR-1
 146,
*Nset, nset=P5-S10-S, instance=Pipe5_X-1
 9,
*Nset, nset=P6-S1-M, instance=Beams-SR-1
 8,
*Nset, nset=P6-S1-S, instance=Pipe6_Z-1
 2,
*Nset, nset=P6-S2-M, instance=LR-1
 24,
*Nset, nset=P6-S2-S, instance=Pipe6_Z-1
 3,
*Nset, nset=P7-S1-M, instance=Beams-SR-1
 6,
*Nset, nset=P7-S1-S, instance=Pipe7_Z-1
 3,
*Nset, nset=P7-S2-M, instance=LR-1
 23,
*Nset, nset=P7-S2-S, instance=Pipe7_Z-1
 2,
*Nset, nset=P7-S3-M, instance=Beams-LR-1
 35,
*Nset, nset=P7-S3-S, instance=Pipe7_X-1
 2,
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*Elset, elset=Pipe1, instance=Pipe1_Z-1, generate
  1,  56,   1
*Elset, elset=Pipe1, instance=Pipe1_elbow90-1, generate
   1,  137,    1
*Elset, elset=Pipe1, instance=Pipe1_elbow45-1, generate
  1,  82,   1
*Elset, elset=Pipe1, instance=Pipe1_X-1, generate
   1,  174,    1
*Elset, elset=Pipe1, instance=Pipe1_Y-1, generate
  1,  64,   1
*Elset, elset=Pipe1, instance=Pipe1_YZ-1, generate
  1,  10,   1
*Elset, elset=Pipe1, instance=Pipe1_elbow90-3, generate
   1,  137,    1
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*Elset, elset=Pipe2, instance=Pipe2_Z-1, generate
  1,  65,   1
*Elset, elset=Pipe2, instance=Pipe2_Elbow90-1, generate
   1,  120,    1
*Elset, elset=Pipe2, instance=Pipe2_Elbow45-1, generate
  1,  74,   1
*Elset, elset=Pipe2, instance=Pipe2_Elbow90-3, generate
   1,  120,    1
*Elset, elset=Pipe2, instance=Pipe2_Elbow90-2, generate
   1,  120,    1
*Elset, elset=Pipe2, instance=Pipe2_Elbow90-4, generate
   1,  120,    1
*Elset, elset=Pipe2, instance=Pipe2_Y-1, generate
  1,  44,   1
*Elset, elset=Pipe2, instance=Pipe2_YZ-1, generate
  1,  17,   1
*Elset, elset=Pipe2, instance=Pipe2_ShortY-1, generate
  1,  13,   1
*Elset, elset=Pipe2, instance=Pipe2_X-1, generate
  1,  88,   1
*Elset, elset=Pipe2, instance=Pipe2_ShortZ-1, generate
  1,  54,   1
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*Elset, elset=Pipe3, instance=Pipe3_Z-1, generate
   1,  139,    1
*Elset, elset=Pipe3, instance=Pipe3_Elbow90-1, generate
   1,  119,    1
*Elset, elset=Pipe3, instance=Pipe3_Y-1, generate
  1,  68,   1
*Elset, elset=Pipe3, instance=Pipe3_ShortY1-1, generate
  1,  35,   1
*Elset, elset=Pipe3, instance=Pipe3_Elbow90-4, generate
   1,  119,    1
*Elset, elset=Pipe3, instance=Pipe3_Z2-1, generate
   1,  108,    1
*Elset, elset=Pipe3, instance=Pipe3_X2-1, generate
   1,  114,    1
*Elset, elset=Pipe3, instance=Pipe3_Elbow90-3, generate
   1,  119,    1
*Elset, elset=Pipe3, instance=Pipe3_Elbow90-5, generate
   1,  119,    1
*Elset, elset=Pipe3, instance=Pipe3_Y4-1, generate
  1,  16,   1
*Elset, elset=Pipe3, instance=Pipe3_Elbow90-2, generate
   1,  119,    1
*Elset, elset=Pipe3, instance=Pipe3_Y2-1, generate
  1,  34,   1
*Elset, elset=Pipe3, instance=Pipe3_Elbow90-6, generate
   1,  119,    1
*Elset, elset=Pipe3, instance=Pipe3_X1-1, generate
   1,  134,    1
*Elset, elset=Pipe3, instance=Pipe3_Elbow90-7, generate
   1,  119,    1
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*Elset, elset=Pipe5, instance=Pipe5_Z-1, generate
  1,  97,   1
*Elset, elset=Pipe5, instance=Pipe5_Elbow90-1, generate
   1,  103,    1
*Elset, elset=Pipe5, instance=Pipe5_Elbow45-1, generate
  1,  88,   1
*Elset, elset=Pipe5, instance=Pipe5_Elbow90-2, generate
   1,  103,    1
*Elset, elset=Pipe5, instance=Pipe5_Y-1, generate
  1,  44,   1
*Elset, elset=Pipe5, instance=Pipe5_YZ-1, generate
  1,  29,   1
*Elset, elset=Pipe5, instance=Pipe5_X-1, generate
   1,  308,    1
*Nset, nset=Pipe6, instance=Pipe6_Z-1, generate
   1,  156,    1
*Nset, nset=Pipe6, instance=Pipe6_Elbow90-1, generate
   1,  193,    1
*Nset, nset=Pipe6, instance=Pipe6_Elbow90-2, generate
   1,  193,    1
*Nset, nset=Pipe6, instance=Pipe6_Y2-1, generate
  1,  37,   1
*Nset, nset=Pipe6, instance=Pipe6_Z2-1, generate
  1,  68,   1
*Nset, nset=Pipe6, instance=Pipe6_Y-1, generate
  1,  68,   1
*Nset, nset=Pipe6, instance=Pipe6_Elbow90-3, generate
   1,  193,    1
*Elset, elset=Pipe6, instance=Pipe6_Z-1, generate
   1,  155,    1
*Elset, elset=Pipe6, instance=Pipe6_Elbow90-1, generate
  1,  96,   1
*Elset, elset=Pipe6, instance=Pipe6_Elbow90-2, generate
  1,  96,   1
*Elset, elset=Pipe6, instance=Pipe6_Y2-1, generate
  1,  36,   1
*Elset, elset=Pipe6, instance=Pipe6_Z2-1, generate
  1,  67,   1
*Elset, elset=Pipe6, instance=Pipe6_Y-1, generate
  1,  67,   1
*Elset, elset=Pipe6, instance=Pipe6_Elbow90-3, generate
  1,  96,   1
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*Elset, elset=Pipe7, instance=Pipe7_Z-1, generate
   1,  166,    1
*Elset, elset=Pipe7, instance=Pipe7_Elbow90-1, generate
  1,  90,   1
*Elset, elset=Pipe7, instance=Pipe7_Elbow90-2, generate
  1,  90,   1
*Elset, elset=Pipe7, instance=Pipe7_X-1, generate
  1,  58,   1
*Elset, elset=Pipe7, instance=Pipe7_Y1-1, generate
  1,  18,   1
*Elset, elset=Pipe7, instance=Pipe7_Y2-1, generate
  1,  31,   1
*Elset, elset=Pipe7, instance=Pipe7_Y-1, generate
  1,  45,   1
*Elset, elset=Pipe7, instance=Pipe7_Elbow90-4, generate
  1,  90,   1
*Elset, elset=Pipe7, instance=Pipe7_Z1-1, generate
  1,  84,   1
*Elset, elset=Pipe7, instance=Pipe7_Elbow90-3, generate
  1,  90,   1
*Elset, elset=Pipe7, instance=Pipe7_Elbow90-5, generate
  1,  90,   1
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*Nset, nset=_PickedSet338, internal, instance=Pipe2_ShortZ-1
 1,
*Nset, nset=_PickedSet338, internal, instance=Pipe3_Z2-1
 109,
*Nset, nset=_PickedSet338, internal, instance=Pipe6_Z2-1
 1,
*Nset, nset=_PickedSet338, internal, instance=Pipe7_Z1-1
 1,
*Nset, nset=_PickedSet339, internal, instance=Pipe1_Y-1
 1,
*Nset, nset=_PickedSet339, internal, instance=Pipe3_Y-1
 1,
*Nset, nset=_PickedSet339, internal, instance=Pipe6_Y-1
 1,
*Nset, nset=_PickedSet339, internal, instance=Pipe4_Y-1
 1,
*Nset, nset=_PickedSet339, internal, instance=Pipe2_Y-1
 1,
*Nset, nset=_PickedSet339, internal, instance=Pipe5_Y-1
 1,
*Nset, nset=_PickedSet339, internal, instance=Pipe7_Y-1
 1,
*Nset, nset=_PickedSet342, internal, instance=Pipe1_X-1
 9,
*Nset, nset=_PickedSet342, internal, instance=Pipe4_X-1
 1,
*Surface, type=NODE, name=P1-S3-slave_CNS_, internal
P1-S3-slave, 1.
*Surface, type=NODE, name=P1-S4-slave_CNS_, internal
P1-S4-slave, 1.
*Surface, type=NODE, name=P1-S5-slave_CNS_, internal
P1-S5-slave, 1.
*Surface, type=NODE, name=P1-S6-slave_CNS_, internal
P1-S6-slave, 1.
*Surface, type=NODE, name=P1-S7-slave_CNS_, internal
P1-S7-slave, 1.
*Surface, type=NODE, name=P1-S8-slave_CNS_, internal
P1-S8-slave, 1.
*Surface, type=NODE, name=P1-S9-slave_CNS_, internal
P1-S9-slave, 1.
*Surface, type=NODE, name=P1-S1-slave_CNS_, internal
P1-S1-slave, 1.
*Surface, type=NODE, name=P1-S2-slave_CNS_, internal
P1-S2-slave, 1.
*Surface, type=NODE, name=P2-S1-slave_CNS_, internal
P2-S1-slave, 1.
*Surface, type=NODE, name=P2-S2-slave_CNS_, internal
P2-S2-slave, 1.
*Surface, type=NODE, name=P2-S3-S_CNS_, internal
P2-S3-S, 1.
*Surface, type=NODE, name=P2-S4-S_CNS_, internal
P2-S4-S, 1.
*Surface, type=NODE, name=P2-S5-S_CNS_, internal
P2-S5-S, 1.
*Surface, type=NODE, name=P2-S6-S_CNS_, internal
P2-S6-S, 1.
*Surface, type=NODE, name=P3-S1-S_CNS_, internal
P3-S1-S, 1.
*Surface, type=NODE, name=P3-S2-S_CNS_, internal
P3-S2-S, 1.
*Surface, type=NODE, name=P3-S3-S_CNS_, internal
P3-S3-S, 1.
*Surface, type=NODE, name=P3-S4-S_CNS_, internal
P3-S4-S, 1.
*Surface, type=NODE, name=P3-S5-S_CNS_, internal
P3-S5-S, 1.
*Surface, type=NODE, name=P3-S6-S_CNS_, internal
P3-S6-S, 1.
*Surface, type=NODE, name=P3-S7-S_CNS_, internal
P3-S7-S, 1.
*Surface, type=NODE, name=P3-S8-S_CNS_, internal
P3-S8-S, 1.
*Surface, type=NODE, name=P3-S9-S_CNS_, internal
P3-S9-S, 1.
*Surface, type=NODE, name=P3-S10-S_CNS_, internal
P3-S10-S, 1.
*Surface, type=NODE, name=P3-S11-S_CNS_, internal
P3-S11-S, 1.
*Surface, type=NODE, name=P4-S1-S_CNS_, internal
P4-S1-S, 1.
*Surface, type=NODE, name=P4-S2-S_CNS_, internal
P4-S2-S, 1.
*Surface, type=NODE, name=P4-S3-S_CNS_, internal
P4-S3-S, 1.
*Surface, type=NODE, name=P4-S4-S_CNS_, internal
P4-S4-S, 1.
*Surface, type=NODE, name=P4-S5-S_CNS_, internal
P4-S5-S, 1.
*Surface, type=NODE, name=P4-S6-S_CNS_, internal
P4-S6-S, 1.
*Surface, type=NODE, name=P4-S7-S_CNS_, internal
P4-S7-S, 1.
*Surface, type=NODE, name=P4-S8-S_CNS_, internal
P4-S8-S, 1.
*Surface, type=NODE, name=P4-S9-S_CNS_, internal
P4-S9-S, 1.
*Surface, type=NODE, name=P4-S10-S_CNS_, internal
P4-S10-S, 1.
*Surface, type=NODE, name=P5-S1-S_CNS_, internal
P5-S1-S, 1.
*Surface, type=NODE, name=P5-S2-S_CNS_, internal
P5-S2-S, 1.
*Surface, type=NODE, name=P5-S3-S_CNS_, internal
P5-S3-S, 1.
*Surface, type=NODE, name=P5-S4-S_CNS_, internal
P5-S4-S, 1.
*Surface, type=NODE, name=P5-S5-S_CNS_, internal
P5-S5-S, 1.
*Surface, type=NODE, name=P5-S7-S_CNS_, internal
P5-S7-S, 1.
*Surface, type=NODE, name=P5-S8-S_CNS_, internal
P5-S8-S, 1.
*Surface, type=NODE, name=P5-S9-S_CNS_, internal
P5-S9-S, 1.
*Surface, type=NODE, name=P5-S10-S_CNS_, internal
P5-S10-S, 1.
*Surface, type=NODE, name=P6-S1-S_CNS_, internal
P6-S1-S, 1.
*Surface, type=NODE, name=P6-S2-S_CNS_, internal
P6-S2-S, 1.
*Surface, type=NODE, name=P7-S1-S_CNS_, internal
P7-S1-S, 1.
*Surface, type=NODE, name=P7-S2-S_CNS_, internal
P7-S2-S, 1.
*Surface, type=NODE, name=P7-S3-S_CNS_, internal
P7-S3-S, 1.
*Surface, type=NODE, name=P5-S6-S_CNS_, internal
P5-S6-S, 1.
** Constraint: P1-S3
*Coupling, constraint name=P1-S3, ref node=P1-S3-Master, surface=P1-S3-slave_CNS_
*Kinematic
2, 2
3, 3
** Constraint: P1-S4
*Coupling, constraint name=P1-S4, ref node=P1-S4-Master, surface=P1-S4-slave_CNS_
*Kinematic
2, 2
3, 3
** Constraint: P1-S5
*Coupling, constraint name=P1-S5, ref node=P1-S5-master, surface=P1-S5-slave_CNS_
*Kinematic
** Constraint: P1-S6
*Coupling, constraint name=P1-S6, ref node=P1-S6-Master, surface=P1-S6-slave_CNS_
*Kinematic
2, 2
3, 3
** Constraint: P1-S7
*Coupling, constraint name=P1-S7, ref node=P1-S7-master, surface=P1-S7-slave_CNS_
*Kinematic
2, 2
3, 3
** Constraint: P1-S8
*Coupling, constraint name=P1-S8, ref node=P1-S8-master, surface=P1-S8-slave_CNS_
*Kinematic
2, 2
3, 3
** Constraint: P1-S9
*Coupling, constraint name=P1-S9, ref node=P1-S9-master, surface=P1-S9-slave_CNS_
*Kinematic
2, 2
3, 3
** Constraint: P1_S1
*Coupling, constraint name=P1_S1, ref node=P1-S1-Master, surface=P1-S1-slave_CNS_
*Kinematic
1, 1
3, 3
** Constraint: P1_S2
*Coupling, constraint name=P1_S2, ref node=P1-S2-Master, surface=P1-S2-slave_CNS_
*Kinematic
1, 1
3, 3
** Constraint: P2-S1
*Coupling, constraint name=P2-S1, ref node=P2-S1-Master, surface=P2-S1-slave_CNS_
*Kinematic
1, 1
3, 3
** Constraint: P2-S2
*Coupling, constraint name=P2-S2, ref node=P2-S2-master, surface=P2-S2-slave_CNS_
*Kinematic
1, 1
3, 3
** Constraint: P2-S3
*Coupling, constraint name=P2-S3, ref node=P2-S3-M, surface=P2-S3-S_CNS_
*Kinematic
2, 2
3, 3
** Constraint: P2-S4
*Coupling, constraint name=P2-S4, ref node=P2-S4-M, surface=P2-S4-S_CNS_
*Kinematic
1, 1
2, 2
3, 3
** Constraint: P2-S5
*Coupling, constraint name=P2-S5, ref node=P2-S5-M, surface=P2-S5-S_CNS_
*Kinematic
2, 2
3, 3
** Constraint: P2-S6
*Coupling, constraint name=P2-S6, ref node=P2-S6-M, surface=P2-S6-S_CNS_
*Kinematic
2, 2
3, 3
** Constraint: P3-S1
*Coupling, constraint name=P3-S1, ref node=P3-S1-M, surface=P3-S1-S_CNS_
*Kinematic
1, 1
3, 3
** Constraint: P3-S2
*Coupling, constraint name=P3-S2, ref node=P3-S2-M, surface=P3-S2-S_CNS_
*Kinematic
1, 1
3, 3
** Constraint: P3-S3
*Coupling, constraint name=P3-S3, ref node=P3-S3-M, surface=P3-S3-S_CNS_
*Kinematic
1, 1
3, 3
** Constraint: P3-S4
*Coupling, constraint name=P3-S4, ref node=P3-S4-M, surface=P3-S4-S_CNS_
*Kinematic
1, 1
3, 3
** Constraint: P3-S5
*Coupling, constraint name=P3-S5, ref node=P3-S5-M, surface=P3-S5-S_CNS_
*Kinematic
1, 1
3, 3
** Constraint: P3-S6
*Coupling, constraint name=P3-S6, ref node=P3-S6-M, surface=P3-S6-S_CNS_
*Kinematic
2, 2
3, 3
** Constraint: P3-S7
*Coupling, constraint name=P3-S7, ref node=P3-S7-M, surface=P3-S7-S_CNS_
*Kinematic
2, 2
3, 3
** Constraint: P3-S8
*Coupling, constraint name=P3-S8, ref node=P3-S8-M, surface=P3-S8-S_CNS_
*Kinematic
2, 2
3, 3
** Constraint: P3-S9
*Coupling, constraint name=P3-S9, ref node=P3-S9-M, surface=P3-S9-S_CNS_
*Kinematic
1, 1
2, 2
3, 3
** Constraint: P3-S10
*Coupling, constraint name=P3-S10, ref node=P3-S10-M, surface=P3-S10-S_CNS_
*Kinematic
2, 2
3, 3
** Constraint: P3-S11
*Coupling, constraint name=P3-S11, ref node=P3-S11-M, surface=P3-S11-S_CNS_
*Kinematic
2, 2
3, 3
** Constraint: P4-S1
*Coupling, constraint name=P4-S1, ref node=P4-S1-M, surface=P4-S1-S_CNS_
*Kinematic
1, 1
3, 3
** Constraint: P4-S2
*Coupling, constraint name=P4-S2, ref node=P4-S2-M, surface=P4-S2-S_CNS_
*Kinematic
1, 1
3, 3
** Constraint: P4-S3
*Coupling, constraint name=P4-S3, ref node=P4-S3-M, surface=P4-S3-S_CNS_
*Kinematic
2, 2
3, 3
** Constraint: P4-S4
*Coupling, constraint name=P4-S4, ref node=P4-S4-M, surface=P4-S4-S_CNS_
*Kinematic
2, 2
3, 3
** Constraint: P4-S5
*Coupling, constraint name=P4-S5, ref node=P4-S5-M, surface=P4-S5-S_CNS_
*Kinematic
2, 2
3, 3
** Constraint: P4-S6
*Coupling, constraint name=P4-S6, ref node=P4-S6-M, surface=P4-S6-S_CNS_
*Kinematic
2, 2
3, 3
** Constraint: P4-S7
*Coupling, constraint name=P4-S7, ref node=P4-S7-M, surface=P4-S7-S_CNS_
*Kinematic
** Constraint: P4-S8
*Coupling, constraint name=P4-S8, ref node=P4-S8-M, surface=P4-S8-S_CNS_
*Kinematic
2, 2
3, 3
** Constraint: P4-S9
*Coupling, constraint name=P4-S9, ref node=P4-S9-M, surface=P4-S9-S_CNS_
*Kinematic
2, 2
3, 3
** Constraint: P4-S10
*Coupling, constraint name=P4-S10, ref node=P4-S10-M, surface=P4-S10-S_CNS_
*Kinematic
2, 2
3, 3
** Constraint: P5-S1
*Coupling, constraint name=P5-S1, ref node=P5-S1-M, surface=P5-S1-S_CNS_
*Kinematic
1, 1
3, 3
** Constraint: P5-S2
*Coupling, constraint name=P5-S2, ref node=P5-S2-M, surface=P5-S2-S_CNS_
*Kinematic
1, 1
3, 3
** Constraint: P5-S3
*Coupling, constraint name=P5-S3, ref node=P5-S3-M, surface=P5-S3-S_CNS_
*Kinematic
2, 2
3, 3
** Constraint: P5-S4
*Coupling, constraint name=P5-S4, ref node=P5-S4-M, surface=P5-S4-S_CNS_
*Kinematic
2, 2
3, 3
** Constraint: P5-S5
*Coupling, constraint name=P5-S5, ref node=P5-S5-M, surface=P5-S5-S_CNS_
*Kinematic
2, 2
3, 3
** Constraint: P5-S7
*Coupling, constraint name=P5-S7, ref node=P5-S7-M, surface=P5-S7-S_CNS_
*Kinematic
2, 2
3, 3
** Constraint: P5-S8
*Coupling, constraint name=P5-S8, ref node=P5-S8-M, surface=P5-S8-S_CNS_
*Kinematic
** Constraint: P5-S9
*Coupling, constraint name=P5-S9, ref node=P5-S9-M, surface=P5-S9-S_CNS_
*Kinematic
2, 2
3, 3
** Constraint: P5-S10
*Coupling, constraint name=P5-S10, ref node=P5-S10-M, surface=P5-S10-S_CNS_
*Kinematic
2, 2
3, 3
** Constraint: P6-S1
*Coupling, constraint name=P6-S1, ref node=P6-S1-M, surface=P6-S1-S_CNS_
*Kinematic
1, 1
3, 3
** Constraint: P6-S2
*Coupling, constraint name=P6-S2, ref node=P6-S2-M, surface=P6-S2-S_CNS_
*Kinematic
** Constraint: P7-S1
*Coupling, constraint name=P7-S1, ref node=P7-S1-M, surface=P7-S1-S_CNS_
*Kinematic
1, 1
3, 3
** Constraint: P7-S2
*Coupling, constraint name=P7-S2, ref node=P7-S2-M, surface=P7-S2-S_CNS_
*Kinematic
** Constraint: P7-S3
*Coupling, constraint name=P7-S3, ref node=P7-S3-M, surface=P7-S3-S_CNS_
*Kinematic
2, 2
3, 3
** Constraint: p5-S6
*Coupling, constraint name=p5-S6, ref node=P5-S6-M, surface=P5-S6-S_CNS_
*Kinematic
2, 2
3, 3
*End Assembly
*Amplitude, name=x170
             0.,         0.50524,            0.01,          0.5945,            0.02,         0.60834,            0.03,         0.61161
           0.04,         0.64942,            0.05,         0.67349,            0.06,         0.62567,            0.07,          0.5442
           0.08,         0.50569,            0.09,         0.51555,             0.1,          0.5357,            0.11,         0.56662
           0.12,             0.6,            0.13,         0.55652,            0.14,         0.38498,            0.15,         0.17961
           0.16,        0.077044,            0.17,        0.083153,            0.18,         0.10862,            0.19,         0.12813
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            5.8,        -0.03992,            5.81,        -0.02736,            5.82,        0.012644,            5.83,        0.062755
*Amplitude, name=y170
             0.,        -0.27038,            0.01,        -0.29563,            0.02,        -0.29249,            0.03,        -0.21985
           0.04,       -0.098822,            0.05,       0.0022952,            0.06,        0.058642,            0.07,         0.10099
           0.08,         0.15004,            0.09,         0.19945,             0.1,         0.25613,            0.11,         0.34402
           0.12,         0.47202,            0.13,         0.63141,            0.14,         0.80787,            0.15,         0.97552
           0.16,          1.1092,            0.17,          1.2189,            0.18,          1.3314,            0.19,          1.4352
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            5.8,           0.456,            5.81,         0.47718,            5.82,         0.49848,            5.83,         0.49149
*Amplitude, name=z170
             0.,         0.11603,            0.01,         0.10155,            0.02,        0.069604,            0.03,        0.071996
           0.04,         0.12525,            0.05,          0.1716,            0.06,         0.15777,            0.07,         0.11408
           0.08,        0.097703,            0.09,         0.10481,             0.1,         0.10102,            0.11,        0.084021
           0.12,        0.049508,            0.13,       -0.039564,            0.14,         -0.1833,            0.15,        -0.30528
           0.16,        -0.34535,            0.17,        -0.33008,            0.18,        -0.31065,            0.19,        -0.30103
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            5.8,        0.056948,            5.81,         0.10288,            5.82,         0.11963,            5.83,        0.093714
**
** MATERIALS
**
*Material, name=CONCRETE
*Damping, alpha=1.18876, beta=0.00204008
*Density
 2.55e-09,
*Elastic
35220., 0.2
*Plastic
 29.5,      0.
 29.5,   0.002
 33.6,  0.0044
 33.4, 0.00528
 30.2,  0.0082
 26.4,  0.0084
*Material, name=PIPE3
*Density
 1.00902e-08,
*Elastic
204000., 0.3
*Plastic
 366.2,    0.
 413.6, 0.025
  461.,  0.05
*Material, name=PIPE4
*Density
 1.08149e-08,
*Elastic
204000., 0.3
*Plastic
 366.2,    0.
 413.6, 0.025
  461.,  0.05
*Material, name=PIPE6
*Density
 1.24981e-08,
*Elastic
204000., 0.3
*Plastic
 366.2,    0.
 413.6, 0.025
  461.,  0.05
*Material, name=PIPE8
*Density
 1.33749e-08,
*Elastic
204000., 0.3
*Plastic
 366.2,    0.
 413.6, 0.025
  461.,  0.05
*Material, name=PIPE10
*Density
 1.40655e-08,
*Elastic
204000., 0.3
*Plastic
 366.2,    0.
 413.6, 0.025
  461.,  0.05
*Material, name=PIPE12
*Density
 1.4635e-08,
*Elastic
204000., 0.3
*Plastic
 366.2,    0.
 413.6, 0.025
  461.,  0.05
*Material, name=PIPE16
*Density
 1.60494e-08,
*Elastic
204000., 0.3
*Plastic
 366.2,    0.
 413.6, 0.025
  461.,  0.05
** ----------------------------------------------------------------
**
** STEP: Implicit
**
*Step, name=Implicit, nlgeom=NO, inc=1000000
*Dynamic
0.0001,5.83,1e-10,0.01
**
** BOUNDARY CONDITIONS
**
** Name: Pin-Copy Type: Displacement/Rotation
*Boundary
_PickedSet338, 1, 1
_PickedSet338, 3, 3
** Name: Pin-Y-Copy Type: Displacement/Rotation
*Boundary
_PickedSet342, 2, 2
_PickedSet342, 3, 3
** Name: X Type: Acceleration/Angular acceleration
*Boundary, amplitude=x170, type=ACCELERATION
BC, 1, 1, 1000.
** Name: Y Type: Acceleration/Angular acceleration
*Boundary, amplitude=y170, type=ACCELERATION
BC, 2, 2, 1000.
** Name: Z Type: Acceleration/Angular acceleration
*Boundary, amplitude=z170, type=ACCELERATION
BC, 3, 3, 1000.
** Name: pintank Type: Displacement/Rotation
*Boundary
_PickedSet339, 1, 1
_PickedSet339, 2, 2
_PickedSet339, 3, 3
**
** LOADS
**
** Name: Gravity   Type: Gravity
*Dload
, GRAV, 9810., 0., 0., -1.
** Name: LL   Type: Line load
*Dload
LineLoad, PY, 0.
LineLoad, PZ, -4.
** Name: P1   Type: Pipe pressure
*Dload
Pipe1, PI, 0.28, 406.4
** Name: P2   Type: Pipe pressure
*Dload
Pipe2, PI, 0.02, 273.05
** Name: P3   Type: Pipe pressure
*Dload
Pipe3, PI, 0.02, 114.3
** Name: P5   Type: Pipe pressure
*Dload
Pipe5, PI, 0.03, 323.85
** Name: P6   Type: Pipe pressure
*Dload
Pipe6, PI, 1.63, 219.08
** Name: P7   Type: Pipe pressure
*Dload
Pipe7, PI, 0.1, 168.28
**
** OUTPUT REQUESTS
**
*Restart, write, frequency=0
**
** FIELD OUTPUT: F-Output-1
**
*Output, field
*Node Output
A, CF, RF, U, V
*Element Output, directions=YES
IE, LE, NFORC, NFORCSO, PE, PEEQ, PEEQMAX, PEMAG, S, SF
**
** HISTORY OUTPUT: H-Output-1
**
*Output, history, variable=PRESELECT
*End Step
